PSCONTROL,ALL,ON
/FILNAME,SOLID185_TET
/NERR,9E7,9E7,,0
/PAGE,-1,132,-1
/FORMAT,,,16
/HEADER,OFF

/PREP7
SHPP,OFF
/UNITS,SI

! ****** DEFINE STEEL MATERIAL (MATERIAL NO 1) ******
MP,EX,1,2.1E11
MP,NUXY,1,0.3

ET,1,185

! ====== GEOMETRY PARAMETERS
XDIM = 31
YDIM = 3.26
ZDIM = 13
R = 0.5*2.82

! ====== MESH SIZE
ES = 0.1*XDIM

! ====== GEOMETRY DEFINITION
CSYS,0
WPCSYS,,0
BLOCK,0,XDIM,0,YDIM,0,ZDIM
CM,PLATE,VOLU

VSEL,NONE

CLOCAL,15,0,0.25*XDIM,0,ZDIM/3,0,90,0
WPCSYS,,15
CYLIND,0,R,0,-YDIM
CLOCAL,16,0,0.5*XDIM,ZDIM/3,0
WPCSYS,,16
CYLIND,0,R,0,-YDIM

CM,HOLES,VOLU

ALLS
VSBV,PLATE,HOLES,,DELETE

LESIZE,ALL,ES

MSHAPE,1,3D
MSHKEY,0

VMESH,ALL

ALLS
CSYS,0
ASEL,S,LOC,X,0
NSLA,S,1
CM,FIXED,NODE
ASEL,S,LOC,X,XDIM
NSLA,S,1
CM,UX_DISP,NODE

! ============== START SOLUTION ===============
/SOLU
ANTYPE,STATIC,NEW
PSCONTROL,ALL,ON
DSPOPTION,,INCORE
ALLS

D,FIXED,ALL
D,UX_DISP,UX,0.001

CDWRITE,DB

!SOLVE

/POST1

!SAVE
